** Lab 02 input file test
**
** NODES
**
*Node, nset = nglobal
   1,     0.0,     0.0,     0.0
   2,    20.0,     0.0,     0.0
   3,    40.0,     0.0,     0.0
   4,    60.0,     0.0,     0.0
   5,    80.0,     0.0,     0.0
   6,   100.0,     0.0,     0.0
   7,   120.0,     0.0,     0.0
   8,   140.0,     0.0,     0.0
   9,   160.0,     0.0,     0.0
  10,   180.0,     0.0,     0.0
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**
** ELEMENTS
**
*Element, type = S4R
   1,   1,   2,  53,  52
   2,   2,   3,  54,  53
   3,   3,   4,  55,  54
   4,   4,   5,  56,  55
   5,   5,   6,  57,  56
   6,   6,   7,  58,  57
   7,   7,   8,  59,  58
   8,   8,   9,  60,  59
   9,   9,  10,  61,  60
  10,  10,  11,  62,  61
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**
** MATERIALS
**
*Material, name = material_1
*Elastic
72000.0,  0.33
**
** SETS
**
*Nset, nset = fixed_nodes
   1,  52, 103, 154, 205, 256, 307, 358, 409, 460, 511
*Nset, nset = loaded_nodes_internal
 102, 153, 204, 255, 306, 357, 408, 459, 510
*Nset, nset = loaded_nodes_external
  51, 561
*Elset, elset = plate_1, generate
   1, 500,   1
**
** LOCAL ORIENTATION
**
*orientation, name = local_orientation
1.0, 0.0, 0.0, 0.0, 1.0, 0.0
3, 0.0
**
** SHELL PROPERTIES
**
*Shell Section, elset = plate_1, material = material_1, orientation = local_orientation
 1.5,   5
**
** STEP
**
*Step, name = step_1
*Static
**
** BOUNDARY CONDITIONS
**
*Boundary
fixed_nodes, ENCASTRE
**
** LOADS
**
*Cload
loaded_nodes_external,  3, 0.2
loaded_nodes_internal,  3, 0.4
**
** FIELD OUTPUT
**
*Output, field, variable=PRESELECT
**
** HISTORY OUTPUT
**
*Output, history, variable=PRESELECT
**
** PRINT RESULTS TO FILE
**
*NODE FILE
U,
RF,
*EL FILE
S,
*End Step
